#---------------------------WELCOME----------------------------
print "Optimise lattice constant of MgO crystal"

#--------------------INITIALISATION----------------------------
units metal		#distance in A and energy in eV
atom_style charge	#specifies what properties to associate with atoms

#cell vectors
variable a equal  4.212
atom_modify     map array sort 0 0.0

region box block 0.0 4.212 0.0 12.636 0.0 12.636 units box
boundary p p p  #PBC in x-direction
create_box 2 box  #generate simulation box

# set these parameters
# make sure neigh skin > 2*deltamove

variable iter loop 3000            # number of Monte Carlo moves for disorder
variable disorder equal 500		   #number of montecarlo moves at lower temp

variable deltaperturb equal 0.0    #0.2 max size of initial perturbation per dim
variable deltamove equal 1      #0.1 max size of MC move in one dimension
variable kT equal 1000             # effective T in Boltzmann factor
variable seed equal 582783         # RNG seed

#read in coordinates
read_dump testmc.xyz 0 x y z box no add yes format xyz

#set up potential
set type 1 charge  2.000000
set type 2 charge -2.000000

mass 1 24.305 #specify mass of atoms
mass 2 15.9994 #specify mass of atoms

pair_style hybrid/overlay buck 8.0 coul/long 8.0
pair_coeff 1 2 buck 1284.38000  0.299700  0.000000 8.0
pair_coeff 2 2 buck 9574.95996  0.219200  32.00000 8.0
pair_coeff * * coul/long
kspace_style pppm 1.0e-4
pair_modify table 0

neighbor 2.0 bin
neigh_modify delay 0 every 1 check yes

variable        e equal pe

# run 0 to get energy of perfect lattice
# emin = minimum energy

run             0
variable        emin equal $e

# disorder the system
# estart = initial energy

variable        z atom z+v_deltaperturb*random(-1.0,1.0,${seed})
variable        y atom y+v_deltaperturb*random(-1.0,1.0,${seed})

set             group all z v_z
set             group all y v_y

dump 1 all custom 1 dumpmc.lammpstrj id type xs ys zs  #dump info to trjectory file

run             0

variable        estart equal $e
variable        elast equal $e

#-------------------- loop over Monte Carlo moves ----------------------------

variable        naccept equal 0
variable        increment equal v_naccept+1
variable 	nmoves equal 0.0
variable 	nmincrement equal v_nmoves+1
variable        irandom equal floor(atoms*random(0.0,1.0,${seed})+1)
variable        rn equal random(0.0,1.0,${seed})
variable        boltzfactor equal "exp(atoms*(v_elast - v_e) / v_kT)"

variable 	atomid equal v_i%2

variable        znew equal z[v_i]+v_deltamove*random(-1.0,1.0,${seed})
variable        ynew equal y[v_i]+v_deltamove*random(-1.0,1.0,${seed})
variable        zi equal z[v_i]
variable        yi equal y[v_i]
variable	layeri equal 0
variable 	loweri equal "v_i - 1"
variable 	upperi equal "v_i + 1"

#--------------------- LOOP -----------------------------------
label           loop
print "${kT}"
variable        i equal ${irandom}

# 0 for even, take away one to get lower layer
# !=0 for odd, add one to get upper layer
if		"${atomid} == 0" then &
                  "variable layeri equal ${loweri} " &
                else &
                  "variable layeri equal ${upperi} " &

variable        z0 equal ${zi}
variable        y0 equal ${yi}

variable 	zupdate equal ${znew}
variable 	yupdate equal ${ynew}

set             atom $i z ${zupdate}
set             atom $i y ${yupdate}

set             atom ${layeri} z ${zupdate}
set             atom ${layeri} y ${yupdate}

run             1 pre no post no

if              "$e <= ${elast}" then &
                  "variable elast equal $e" &
                  "variable naccept equal ${increment}" &
                elif "${rn} <= ${boltzfactor}" &
                  "variable elast equal $e" &
                  "variable naccept equal ${increment}" &
                else &
                  "set atom $i z ${z0}" &
                  "set atom $i y ${y0}" &
                  "set atom ${layeri} z ${z0}" &
                  "set atom ${layeri} y ${y0}" &

variable 	nmoves equal ${nmincrement}

if		"${nmoves} > ${disorder}" then &
		"variable kT equal 0.5" &

next            iter
jump            SELF loop

# final energy and stats

variable       nb equal nbuild
variable       nbuild equal ${nb}
variable       ratio equal "v_naccept/v_nmoves"

run             0

#-------------------------END OF MONTE CARLO------------------------
print           "MC stats:"
print           "  neighbor list rebuilds = ${nbuild}"
print           "  starting energy = ${estart}"
print           "  final energy = $e"
print           "  minimum energy of perfect lattice = ${emin}"
print           "  accepted MC moves = ${naccept}"
print 		"  Total moves = ${nmoves}"
print 		"  Ratio of accepted/Total = ${ratio}"

print "Calculation complete"
